! OpenDSS PV System Commands
! Generated from 202501 data

New LoadShape.MyIrrad npts=44640 interval=1 mult=(file=202501_irradiance_timeseries.csv)
New LoadShape.MyTemp npts=44640 interval=1 mult=(file=202501_temperature_timeseries.csv)

New XYCurve.Myeff npts=4 xarray=[.1 .2 .4 1.0] yarray=[.86 .9 .93 .97]
New XYCurve.MyPvsT npts=4 xarray=[0 25 75 100] yarray=[1.2 1.0 0.8 0.6]

! Example PV System Definition
New PVSystem.PV834 phases=3 bus1=trafo_pv kV=0.48 kVA=200 irrad=0.112 Pmpp=180 temperature=-1.6 PF=1 %cutin=0.1 %cutout=0.1 effcurve=Myeff P-TCurve=MyPvsT Duty=MyIrrad TDuty=MyTemp
