Clear

!
! This script is based on a script developed by Tennessee Tech Univ students
! Tyler Patton, Jon Wood, and David Woods, April 2009
!


new circuit.IEEE13Nodeckt
~ basekv=230 pu=1.016 phases=3 bus1=SourceBus
~ Angle=30.63                                                         ! advance angle 30 deg so result agree with published angle
~ MVAsc3=20000 MVASC1=21000    ! stiffen the source to approximate inf source


!SUB TRANSFORMER DEFINITION
! Although this data was given, it does not appear to be used in the test case results
! The published test case starts at 1.0 per unit at Bus 650. To make this happen, we will change the impedance
! on the transformer to something tiny by dividing by 1000 using the DSS in-line RPN math
New Transformer.Sub Phases=3 Windings=2   XHL=(8 1000 /)
~ wdg=1 bus=SourceBus   conn=delta  kv=230  kva=15000   %r=(.5 1000 /)  XHT=4
~ wdg=2 bus=650             conn=wye    kv=75  kva=15000   %r=(.5 1000 /)   XLT=4

! FEEDER 1-PHASE VOLTAGE REGULATORS
! Define low-impedance 2-wdg transformer

New Transformer.Reg1 phases=1 XHL=0.01 kVAs=[49980 49980]
~ Buses=[650.1 RG60.1] kVs=[43.2  43.2] %LoadLoss=0.01
new regcontrol.Reg1  transformer=Reg1 winding=2  vreg=2196  band=2  ptratio=20 ctprim=700  R=3   X=9

New Transformer.Reg2 phases=1 XHL=0.01 kVAs=[49980 49980]
~ Buses=[650.2 RG60.2] kVs=[43.2  43.2] %LoadLoss=0.01
new regcontrol.Reg2  transformer=Reg2 winding=2  vreg=2196  band=2  ptratio=20 ctprim=700  R=3   X=9

New Transformer.Reg3 phases=1 XHL=0.01 kVAs=[49980 49980]
~ Buses=[650.3 RG60.3] kVs=[43.2  43.2] %LoadLoss=0.01
new regcontrol.Reg3  transformer=Reg3 winding=2  vreg=2196  band=2  ptratio=20 ctprim=700  R=3   X=9


!TRANSFORMER DEFINITION
New Transformer.XFM1  Phases=3   Windings=2  XHL=2
~ wdg=1 bus=633       conn=Wye kv=75    kva=15000    %r=.55     XHT=1
~ wdg=2 bus=634       conn=Wye kv=10    kva=15000    %r=.55   XLT=1
!4.16--75
!2.4--43.2
!0.48-10
!0.277--5.773
!LINE CODES
redirect IEEELineCodes.dss

// these are local matrix line codes
// corrected 9-14-2011
New linecode.mtx601 nphases=3 BaseFreq=60
~ rmatrix = (0.3465 | 0.1560 0.3375 | 0.1580 0.1535 0.3414 )
~ xmatrix = (1.0179 | 0.5017 1.0478 | 0.4236 0.3849 1.0348 )
~ units=mi
New linecode.mtx602 nphases=3 BaseFreq=60
~ rmatrix = (0.7526 | 0.1580 0.7475 | 0.1560 0.1535 0.7436 )
~ xmatrix = (1.1814 | 0.4236 1.1983 | 0.5017 0.3849 1.2112 )
~ units=mi
New linecode.mtx603 nphases=2 BaseFreq=60
~ rmatrix = (1.3238 | 0.2066 1.3294 )
~ xmatrix = (1.3569 | 0.4591 1.3471 )
~ units=mi
New linecode.mtx604 nphases=2 BaseFreq=60
~ rmatrix = (1.3238 | 0.2066 1.3294 )
~ xmatrix = (1.3569 | 0.4591 1.3471 )
~ units=mi
New linecode.mtx605 nphases=1 BaseFreq=60
~ rmatrix = (1.3292 )
~ xmatrix = (1.3475 )
~ units=mi

/*********** Original 606 Linecode *********************

You have to use this to match Kersting's results:

New linecode.mtx606 nphases=3 BaseFreq=60
~ rmatrix = (0.7982 | 0.3192 0.7891 | 0.2849 0.3192 0.7982 )
~ xmatrix = (0.4463 | 0.0328 0.4041 | -0.0143 0.0328 0.4463 )
~ Cmatrix = [257 | 0 257 | 0 0 257]  ! <--- This is too low by 1.5
~ units=mi

Corrected mtx606  Feb 3 2016 by RDugan

The new LineCode.606 is computed using the following CN cable definition and
LineGeometry definition:

New CNDATA.250_1/3 k=13 DiaStrand=0.064 Rstrand=2.816666667 epsR=2.3
~ InsLayer=0.220 DiaIns=1.06 DiaCable=1.16 Rac=0.076705 GMRac=0.20568 diam=0.573
~ Runits=kft Radunits=in GMRunits=in

New LineGeometry.606 nconds=3 nphases=3 units=ft
~ cond=1 cncable=250_1/3 x=-0.5 h= -4
~ cond=2 cncable=250_1/3 x=0   h= -4
~ cond=3 cncable=250_1/3 x=0.5  h= -4

****End Comment******/

New Linecode.mtx606 nphases=3  Units=mi
~ Rmatrix=[0.791721  |0.318476  0.781649  |0.28345  0.318476  0.791721  ]
~ Xmatrix=[0.438352  |0.0276838  0.396697  |-0.0184204  0.0276838  0.438352  ]
~ Cmatrix=[383.948  |0  383.948  |0  0  383.948  ]
New linecode.mtx607 nphases=1 BaseFreq=60
~ rmatrix = (1.3425 )
~ xmatrix = (0.5124 )
~ cmatrix = [236]
~ units=mi

!LOAD DEFINITIONS
! add loadshape
redirect loadshape.dss
!9 loads here can be 9 DERS here

New Load.671 Bus1=671.1.2.3  Phases=3 Conn=Delta Model=1 kV=75   kW=69300 kvar=39600 Duty=loadshape_671
New Load.634a Bus1=634.1     Phases=1 Conn=Wye  Model=1 kV=5.773  kW=9600   kvar=6600 Duty=loadshape_634a
New Load.634b Bus1=634.2     Phases=1 Conn=Wye  Model=1 kV=5.773  kW=7200   kvar=5400 Duty=loadshape_634b
New Load.634c Bus1=634.3     Phases=1 Conn=Wye  Model=1 kV=5.773  kW=7200   kvar=5400 Duty=loadshape_634c
New Load.645 Bus1=645.2      Phases=1 Conn=Wye  Model=1 kV=43.2   kW=10200   kvar=7500 Duty=loadshape_645
New Load.646 Bus1=646.2.3    Phases=1 Conn=Delta Model=1 kV=75    kW=7800   kvar=7920 Duty=loadshape_646
New Load.692 Bus1=692.3.1    Phases=1 Conn=Delta Model=1 kV=75    kW=10200   kvar=9060 Duty=loadshape_692
New Load.675a Bus1=675.1    Phases=1 Conn=Wye  Model=1 kV=43.2  kW=29100   kvar=11400 Duty=loadshape_675a
New Load.675b Bus1=675.2    Phases=1 Conn=Wye  Model=1 kV=43.2  kW=4080   kvar=3600 Duty=loadshape_675b
New Load.675c Bus1=675.3    Phases=1 Conn=Wye  Model=1 kV=43.2  kW=17400   kvar=12720 Duty=loadshape_675c
New Load.611 Bus1=611.3      Phases=1 Conn=Wye  Model=1 kV=43.2  kW=10200   kvar=4800 Duty=loadshape_611
New Load.652 Bus1=652.1      Phases=1 Conn=Wye  Model=1 kV=43.2  kW=7680   kvar=5160 Duty=loadshape_652
New Load.670a Bus1=670.1    Phases=1 Conn=Wye  Model=1 kV=43.2  kW=1020    kvar=600 Duty=loadshape_670a
New Load.670b Bus1=670.2    Phases=1 Conn=Wye  Model=1 kV=43.2  kW=3960    kvar=2280 Duty=loadshape_670b
New Load.670c Bus1=670.3    Phases=1 Conn=Wye  Model=1 kV=43.2  kW=7020  kvar=4080 Duty=loadshape_670c

!CAPACITOR DEFINITIONS
New Capacitor.Cap1 Bus1=675 phases=3 kVAR=1800 kV=75
New Capacitor.Cap2 Bus1=611.3 phases=1 kVAR=3000 kV=43.2

!Bus 670 is the concentrated point load of the distributed load on line 632 to 671 located at 1/3 the distance from node 632

!LINE DEFINITIONS
New Line.650632    Phases=3 Bus1=RG60.1.2.3   Bus2=632.1.2.3  LineCode=mtx601 Length=2000 units=ft
New Line.632670    Phases=3 Bus1=632.1.2.3    Bus2=670.1.2.3  LineCode=mtx601 Length=667  units=ft
New Line.670671    Phases=3 Bus1=670.1.2.3    Bus2=671.1.2.3  LineCode=mtx601 Length=1333 units=ft
New Line.671680    Phases=3 Bus1=671.1.2.3    Bus2=680.1.2.3  LineCode=mtx601 Length=1000 units=ft
New Line.632633    Phases=3 Bus1=632.1.2.3    Bus2=633.1.2.3  LineCode=mtx602 Length=500  units=ft
New Line.632645    Phases=2 Bus1=632.3.2      Bus2=645.3.2    LineCode=mtx603 Length=500  units=ft
New Line.645646    Phases=2 Bus1=645.3.2      Bus2=646.3.2    LineCode=mtx603 Length=300  units=ft
New Line.692675    Phases=3 Bus1=692.1.2.3    Bus2=675.1.2.3  LineCode=mtx606 Length=500  units=ft
New Line.671684    Phases=2 Bus1=671.1.3      Bus2=684.1.3    LineCode=mtx604 Length=300  units=ft
New Line.684611    Phases=1 Bus1=684.3        Bus2=611.3      LineCode=mtx605 Length=300  units=ft
New Line.684652    Phases=1 Bus1=684.1        Bus2=652.1      LineCode=mtx607 Length=800  units=ft


!SWITCH DEFINITIONS
New Line.671692    Phases=3 Bus1=671   Bus2=692  Switch=y  r1=1e-4 r0=1e-4 x1=0.000 x0=0.000 c1=0.000 c0=0.000

!BATTERY DEFINITIONS. Initialize with 0 kw
New Generator.batt1 bus1=680 kV=75 kW=0.001 pf=0.95 conn=Delta Model=1
New Generator.batt2 bus1=675 kV=75 kW=0.001 pf=0.95 conn=Delta Model=1
New Generator.batt3 bus1=670 kV=75 kW=0.001 pf=0.95 conn=Delta Model=1


!pv defination

redirect irrad_up_down.dss

New Tshape.MyTemp npts=24 interval=1 temp=[25, 25, 25, 25, 25, 25, 25, 25, 25, 25,25, 25, 25, 25, 25, 25, 25, 25, 25, 25,25, 25, 25, 25, 25, 25, 25, 25, 25, 25]
New XYCurve.Eff npts=4 xarray=[.1 .2 .4 1.0] yarray=[1 1 1 1]
New XYCurve.FatorPvsT npts=4 xarray=[0 25 75 100] yarray=[1 1 1 1]

New PVSystem.PV671 phases=3 bus1=671 Pmpp=102941.2 kV=75 kVA=120000 conn=wye EffCurve=Eff
~ P-TCurve=FatorPvsT %Pmpp=60 Temperature=25 irradiance=0.98 pf=0.9 wattpriority=yes Duty=MyIrrad TDuty=MyTemp

New PVSystem.PV634 phases=3 bus1=634 Pmpp=35650 kV=10 kVA=38000 conn=wye EffCurve=Eff
~ P-TCurve=FatorPvsT %Pmpp=60 Temperature=25 irradiance=0.98 pf=0.9 wattpriority=yes Duty=MyIrrad TDuty=MyTemp

New PVSystem.PV6452 phases=1 bus1=645.2 Pmpp=15151.52 kV=43.2 kVA=18000 conn=wye EffCurve=Eff
~ P-TCurve=FatorPvsT %Pmpp=60 Temperature=25 irradiance=0.98 pf=0.9 wattpriority=yes Duty=MyIrrad TDuty=MyTemp

New PVSystem.PV646 phases=1 bus1=646.3 Pmpp=11586.45 kV=43.2 kVA=12000 conn=wye EffCurve=Eff
~ P-TCurve=FatorPvsT %Pmpp=60 Temperature=25 irradiance=0.98 pf=0.9 wattpriority=yes Duty=MyIrrad TDuty=MyTemp

New PVSystem.PV692 phases=1 bus1=692.1 Pmpp=15151.52 kV=43.2 kVA=18000 conn=wye EffCurve=Eff
~ P-TCurve=FatorPvsT %Pmpp=60 Temperature=25 irradiance=0.98 pf=0.9 wattpriority=yes Duty=MyIrrad TDuty=MyTemp

!New PVSystem.PV675 phases=3 bus1=675 Pmpp=75130 kV=75 kVA=78000 conn=wye EffCurve=Eff
!~ P-TCurve=FatorPvsT %Pmpp=60 Temperature=25 irradiance=0.98 pf=0.9 wattpriority=yes Duty=MyIrrad TDuty=MyTemp

New PVSystem.PV6113 phases=1 bus1=611.3 Pmpp=15151.52 kV=43.2 kVA=18000 conn=wye EffCurve=Eff
~ P-TCurve=FatorPvsT %Pmpp=60 Temperature=25 irradiance=0.98 pf=0.9 wattpriority=yes Duty=MyIrrad TDuty=MyTemp

New PVSystem.PV6521 phases=1 bus1=652.1 Pmpp=11408.2 kV=43.2 kVA=12000 conn=wye EffCurve=Eff
~ P-TCurve=FatorPvsT %Pmpp=60 Temperature=25 irradiance=0.98 pf=0.9 wattpriority=yes Duty=MyIrrad TDuty=MyTemp

!New PVSystem.PV670 phases=3 bus1=670 Pmpp=17820 kV=75 kVA=19000 conn=wye EffCurve=Eff
!~ P-TCurve=FatorPvsT %Pmpp=60 Temperature=25 irradiance=0.98 pf=0.9 wattpriority=yes Duty=MyIrrad TDuty=MyTemp

Set Voltagebases=[230, 75, 10]
calcv
BusCoords IEEE13Node_BusXY.csv
Set mode=Duty number=1 hour=0 stepsize=1 sec=0
