! Standard (Mod 1) model of IEEE 34 Bus Test Feeder

! Note: Mod 2 better accounts for distributed load.

Clear

New object=circuit.ieee34-1
~ basekv=230 pu=1.05 angle=30 mvasc3=20000 MVASC1=21000   !stiffen up a bit over DSS default

! Substation Transformer  -- Modification: Make source very stiff by defining a tiny leakage Z
New Transformer.SubXF Phases=3 Windings=2 Xhl=(8 1000 /)    ! normally 8
~ wdg=1 bus=sourcebus conn=Delta kv=230    kva=15000   %r=(.5 1000 /)  XHT=4   !reduce %r, too
~ wdg=2 bus=800       conn=wye   kv=75  kva=15000   %r=(.5 1000 /)   XLT=4

! import line codes with phase impedance matrices
Redirect        IEEELineCodes.dss   ! revised according to Later test feeder doc

! Lines
New Line.L1     Phases=3 Bus1=800.1.2.3  Bus2=802.1.2.3  LineCode=300  Length=2.58   units=kft
New Line.L2     Phases=3 Bus1=802.1.2.3  Bus2=806.1.2.3  LineCode=300  Length=1.73   units=kft
New Line.L3     Phases=3 Bus1=806.1.2.3  Bus2=808.1.2.3  LineCode=300  Length=32.23   units=kft
New Line.L4     Phases=1 Bus1=808.2      Bus2=810.2      LineCode=303  Length=5.804   units=kft
New Line.L5     Phases=3 Bus1=808.1.2.3  Bus2=812.1.2.3  LineCode=300  Length=37.5   units=kft
New Line.L6     Phases=3 Bus1=812.1.2.3  Bus2=814.1.2.3  LineCode=300  Length=29.73   units=kft
New Line.L7     Phases=3 Bus1=814r.1.2.3 Bus2=850.1.2.3  LineCode=301  Length=0.01   units=kft
New Line.L8     Phases=1 Bus1=816.1      Bus2=818.1      LineCode=302  Length=1.71   units=kft
New Line.L9     Phases=3 Bus1=816.1.2.3  Bus2=824.1.2.3  LineCode=301  Length=10.21   units=kft
New Line.L10    Phases=1 Bus1=818.1      Bus2=820.1      LineCode=302  Length=48.15   units=kft
New Line.L11    Phases=1 Bus1=820.1      Bus2=822.1      LineCode=302  Length=13.74   units=kft
New Line.L12    Phases=1 Bus1=824.2      Bus2=826.2      LineCode=303  Length=3.03   units=kft
New Line.L13    Phases=3 Bus1=824.1.2.3  Bus2=828.1.2.3  LineCode=301  Length=0.84   units=kft
New Line.L14    Phases=3 Bus1=828.1.2.3  Bus2=830.1.2.3  LineCode=301  Length=20.44   units=kft
New Line.L15    Phases=3 Bus1=830.1.2.3  Bus2=854.1.2.3  LineCode=301  Length=0.52   units=kft
New Line.L16    Phases=3 Bus1=832.1.2.3  Bus2=858.1.2.3  LineCode=301  Length=4.9   units=kft
New Line.L17    Phases=3 Bus1=834.1.2.3  Bus2=860.1.2.3  LineCode=301  Length=2.02   units=kft
New Line.L18    Phases=3 Bus1=834.1.2.3  Bus2=842.1.2.3  LineCode=301  Length=0.28   units=kft
New Line.L19    Phases=3 Bus1=836.1.2.3  Bus2=840.1.2.3  LineCode=301  Length=0.86   units=kft
New Line.L20    Phases=3 Bus1=836.1.2.3  Bus2=862.1.2.3  LineCode=301  Length=0.28   units=kft
New Line.L21    Phases=3 Bus1=842.1.2.3  Bus2=844.1.2.3  LineCode=301  Length=1.35   units=kft
New Line.L22    Phases=3 Bus1=844.1.2.3  Bus2=846.1.2.3  LineCode=301  Length=3.64   units=kft
New Line.L23    Phases=3 Bus1=846.1.2.3  Bus2=848.1.2.3  LineCode=301  Length=0.53   units=kft
New Line.L24    Phases=3 Bus1=850.1.2.3  Bus2=816.1.2.3  LineCode=301  Length=0.31   units=kft
New Line.L25    Phases=3 Bus1=852r.1.2.3 Bus2=832.1.2.3  LineCode=301  Length=0.01   units=kft

! 75/12.5 kV  Transformer
New Transformer.XFM1  Phases=3 Windings=2 Xhl=2
~ wdg=1 bus=832       conn=wye   kv=75  kva=150000    %r=.55     XHT=1
~ wdg=2 bus=888       conn=Wye   kv=12.5  kva=150000    %r=.55   XLT=1

! Regulators - three independent phases
! Regulator 1
new transformer.reg1a phases=1 windings=2 buses=(814.1 814r.1) conns='wye wye' kvs="43.2 43.2" kVAs=[499800 499800] XHL=0.01 %LoadLoss=0.01
!new regcontrol.reg1a  transformer=reg1a winding=2  vreg=2196  band=20  ptratio=20 ctprim=700  R=3   X=9

new transformer.reg1b phases=1 windings=2 buses=(814.2 814r.2) conns='wye wye' kvs="43.2 43.2" kVAs=[499800 499800] XHL=0.01 %LoadLoss=0.01
!new regcontrol.reg1b  transformer=reg1b winding=2  vreg=2196  band=20  ptratio=20 ctprim=700  R=3   X=9

new transformer.reg1c phases=1 windings=2 buses=(814.3 814r.3) conns='wye wye' kvs="43.2 43.2" kVAs=[499800 499800] XHL=0.01 %LoadLoss=0.01
!new regcontrol.reg1c  transformer=reg1c winding=2  vreg=2196  band=20  ptratio=20 ctprim=700  R=3   X=9
! Regulator 2
new transformer.reg2a phases=1 windings=2 buses=(852.1 852r.1) conns='wye wye' kvs="43.2 43.2" kVAs=[499800 499800] XHL=0.01 %LoadLoss=0.01
!new regcontrol.reg2a  transformer=reg2a winding=2  vreg=2196  band=20  ptratio=20 ctprim=700  R=3   X=9
new transformer.reg2b phases=1 windings=2 buses=(852.2 852r.2) conns='wye wye' kvs="43.2 43.2" kVAs=[499800 499800] XHL=0.01 %LoadLoss=0.01
!new regcontrol.reg2b  transformer=reg2b winding=2  vreg=2196  band=20  ptratio=20 ctprim=700  R=3   X=9
new transformer.reg2c phases=1 windings=2 buses=(852.3 852r.3) conns='wye wye' kvs="43.2 43.2" kVAs=[499800 499800] XHL=0.01 %LoadLoss=0.01
!new regcontrol.reg2c  transformer=reg2c winding=2  vreg=2196  band=20  ptratio=20 ctprim=700  R=3   X=9

New Line.L26    Phases=1 Bus1=854.2      Bus2=856.2      LineCode=303  Length=200   units=ft
New Line.L27    Phases=3 Bus1=854.1.2.3  Bus2=852.1.2.3  LineCode=301  Length=300   units=ft
! 9-17-10 858-864 changed to phase A per error report
New Line.L28    Phases=1 Bus1=858.1      Bus2=864.1      LineCode=303  Length=162  units=ft
New Line.L29    Phases=3 Bus1=858.1.2.3  Bus2=834.1.2.3  LineCode=301  Length=583   units=ft
New Line.L30    Phases=3 Bus1=860.1.2.3  Bus2=836.1.2.3  LineCode=301  Length=268   units=ft
New Line.L31    Phases=1 Bus1=862.2      Bus2=838.2      LineCode=304  Length=486   units=ft
New Line.L32    Phases=3 Bus1=888.1.2.3  Bus2=890.1.2.3  LineCode=300  Length=1056  units=ft

! Capacitors
New Capacitor.C844      Bus1=844        Phases=3        kVAR=0.001        kV=75
New Capacitor.C848      Bus1=848        Phases=3        kVAR=0.001        kV=75

! spot loads
! add loadshape
redirect loadshape.dss

New Load.S860       Bus1=860   Phases=3 Conn=Wye   Model=1 kV= 75 kW=  7200 kVAR=  5760 Duty=loadshape_S860
New Load.S840       Bus1=840   Phases=3 Conn=Wye   Model=5 kV= 75 kW=  3240 kVAR=  2520 Duty=loadshape_S840
New Load.S844       Bus1=844   Phases=3 Conn=Wye   Model=2 kV= 75 kW=  48600 kVAR=  37800 Duty=loadshape_S844

New Load.S848       Bus1=848   Phases=3 Conn=Delta Model=1 kV= 75 kW=  7200 kVAR=  5760 Duty=loadshape_S848
New Load.S830a      Bus1=830.1.2 Phases=1 Conn=Delta Model=2 kV= 75 kW=  1200 kVAR=   600 Duty=loadshape_S830a
New Load.S830b      Bus1=830.2.3 Phases=1 Conn=Delta Model=2 kV= 75 kW=  1200 kVAR=   600 Duty=loadshape_S830b
New Load.S830c      Bus1=830.3.1 Phases=1 Conn=Delta Model=2 kV= 75 kW=  3000 kVAR=  1200 Duty=loadshape_S830c
New Load.S890       Bus1=890   Phases=3 Conn=Delta Model=5 kV=  12.50 kW= 54000 kVAR= 27000 Duty=loadshape_S890


! distributed loads
New Load.D802_806sb Bus1=802.2 Phases=1 Conn=Wye   Model=1 kV= 43.2 kW=  1800 kVAR=   900 Duty=loadshape_D802_806sb
New Load.D802_806rb Bus1=806.2 Phases=1 Conn=Wye   Model=1 kV= 43.2 kW=  1800 kVAR=   900 Duty=loadshape_D802_806rb
New Load.D802_806sc Bus1=802.3 Phases=1 Conn=Wye   Model=1 kV= 43.2 kW=  1500 kVAR=   840 Duty=loadshape_D802_806sc
New Load.D802_806rc Bus1=806.3 Phases=1 Conn=Wye   Model=1 kV= 43.2 kW=  1500 kVAR=   840 Duty=loadshape_D802_806rc

New Load.D808_810sb Bus1=808.2 Phases=1 Conn=Wye   Model=4 kV= 43.2 kW=  960 kVAR=   480 Duty=loadshape_D808_810sb
New Load.D808_810rb Bus1=810.2 Phases=1 Conn=Wye   Model=4 kV= 43.2 kW=  960 kVAR=   480 Duty=loadshape_D808_810rb

New Load.D818_820sa Bus1=818.1 Phases=1 Conn=Wye   Model=2 kV= 43.2 kW=  2040 kVAR=  1020 Duty=loadshape_D818_820sa
New Load.D818_820ra Bus1=820.1 Phases=1 Conn=Wye   Model=2 kV= 43.2 kW=  2040 kVAR=  1020 Duty=loadshape_D818_820ra

New Load.D820_822sa Bus1=820.1 Phases=1 Conn=Wye   Model=1 kV= 43.2 kW=  8100 kVAR=  4200 Duty=loadshape_D820_822sa
New Load.D820_822ra Bus1=822.1 Phases=1 Conn=Wye   Model=1 kV= 43.2 kW=  8100 kVAR=  4200 Duty=loadshape_D820_822ra


New Load.D816_824sb Bus1=816.2 Phases=1 Conn=Delta Model=5 kV= 75 kW=  300 kVAR=  120 Duty=loadshape_D816_824sb
New Load.D816_824rb Bus1=824.2 Phases=1 Conn=Delta Model=5 kV= 75 kW=  300 kVAR=  120 Duty=loadshape_D816_824rb

New Load.D824_826sb Bus1=824.2 Phases=1 Conn=Wye   Model=5 kV= 43.2 kW=  2400 kVAR=  1200 Duty=loadshape_D824_826sb
New Load.D824_826rb Bus1=826.2 Phases=1 Conn=Wye   Model=5 kV= 43.2 kW=  2400 kVAR=  1200 Duty=loadshape_D824_826rb
New Load.D824_828sc Bus1=824.3 Phases=1 Conn=Wye   Model=1 kV= 43.2 kW=   240 kVAR=   120 Duty=loadshape_D824_828sc
New Load.D824_828rc Bus1=828.3 Phases=1 Conn=Wye   Model=1 kV= 43.2 kW=   240 kVAR=   120 Duty=loadshape_D824_828rc

New Load.D828_830sa Bus1=828.1 Phases=1 Conn=Wye   Model=1 kV= 43.2 kW=   420 kVAR=   180 Duty=loadshape_D828_830sa
New Load.D828_830ra Bus1=830.1 Phases=1 Conn=Wye   Model=1 kV= 43.2 kW=   420 kVAR=   180 Duty=loadshape_D828_830ra

New Load.D854_856sb Bus1=854.2 Phases=1 Conn=Wye   Model=1 kV= 43.2 kW=   240 kVAR=   120 Duty=loadshape_D854_856sb
New Load.D854_856rb Bus1=856.2 Phases=1 Conn=Wye   Model=1 kV= 43.2 kW=   240 kVAR=   120 Duty=loadshape_D854_856rb


New Load.D832_858sa Bus1=832.1 Phases=1 Conn=Delta Model=2 kV= 75 kW=   420 kVAR=   180 Duty=loadshape_D832_858sa
New Load.D832_858ra Bus1=858.1 Phases=1 Conn=Delta Model=2 kV= 75 kW=   420 kVAR=   180 Duty=loadshape_D832_858ra
New Load.D832_858sb Bus1=832.2 Phases=1 Conn=Delta Model=2 kV= 75 kW=   120 kVAR=    60 Duty=loadshape_D832_858sb
New Load.D832_858rb Bus1=858.2 Phases=1 Conn=Delta Model=2 kV= 75 kW=   120 kVAR=    60 Duty=loadshape_D832_858rb
New Load.D832_858sc Bus1=832.3 Phases=1 Conn=Delta Model=2 kV= 75 kW=   360 kVAR=   180 Duty=loadshape_D832_858sc
New Load.D832_858rc Bus1=858.3 Phases=1 Conn=Delta Model=2 kV= 75 kW=   360 kVAR=   180 Duty=loadshape_D832_858rc

New Load.D858_864sb Bus1=858.1 Phases=1 Conn=Wye   Model=1 kV= 43.2 kW=   120 kVAR=    60 Duty=loadshape_D858_864sb
New Load.D858_864rb Bus1=864.1 Phases=1 Conn=Wye   Model=1 kV= 43.2 kW=   120 kVAR=    60 Duty=loadshape_D858_864rb

New Load.D858_834sa Bus1=858.1.2 Phases=1 Conn=Delta Model=1 kV= 75 kW=   240 kVAR=   120 Duty=loadshape_D858_834sa
New Load.D858_834ra Bus1=834.1.2 Phases=1 Conn=Delta Model=1 kV= 75 kW=   240 kVAR=   120 Duty=loadshape_D858_834ra
New Load.D858_834sb Bus1=858.2.3 Phases=1 Conn=Delta Model=1 kV= 75 kW=   900 kVAR=   480 Duty=loadshape_D858_834sb
New Load.D858_834rb Bus1=834.2.3 Phases=1 Conn=Delta Model=1 kV= 75 kW=   900 kVAR=   480 Duty=loadshape_D858_834rb
New Load.D858_834sc Bus1=858.3.1 Phases=1 Conn=Delta Model=1 kV= 75 kW=   780 kVAR=   420 Duty=loadshape_D858_834sc
New Load.D858_834rc Bus1=834.3.1 Phases=1 Conn=Delta Model=1 kV= 75 kW=   780 kVAR=   420 Duty=loadshape_D858_834rc


New Load.D834_860sa Bus1=834.1.2 Phases=1 Conn=Delta Model=2 kV= 75 kW=   960 kVAR=   480 Duty=loadshape_D834_860sa
New Load.D834_860ra Bus1=860.1.2 Phases=1 Conn=Delta Model=2 kV= 75 kW=   960 kVAR=   480 Duty=loadshape_D834_860ra
New Load.D834_860sb Bus1=834.2.3 Phases=1 Conn=Delta Model=2 kV= 75 kW=  1200 kVAR=   600 Duty=loadshape_D834_860sb
New Load.D834_860rb Bus1=860.2.3 Phases=1 Conn=Delta Model=2 kV= 75 kW=  1200 kVAR=   600 Duty=loadshape_D834_860rb
New Load.D834_860sc Bus1=834.3.1 Phases=1 Conn=Delta Model=2 kV= 75 kW= 6600 kVAR= 3300 Duty=loadshape_D834_860sc
New Load.D834_860rc Bus1=860.3.1 Phases=1 Conn=Delta Model=2 kV= 75 kW= 6600 kVAR= 3300 Duty=loadshape_D834_860rc

New Load.D860_836sa Bus1=860.1.2 Phases=1 Conn=Delta Model=1 kV= 75 kW=  1800 kVAR=   900 Duty=loadshape_D860_836sa
New Load.D860_836ra Bus1=836.1.2 Phases=1 Conn=Delta Model=1 kV= 75 kW=  1800 kVAR=   900 Duty=loadshape_D860_836ra
New Load.D860_836sb Bus1=860.2.3 Phases=1 Conn=Delta Model=1 kV= 75 kW=   600 kVAR=   360 Duty=loadshape_D860_836sb
New Load.D860_836rb Bus1=836.2.3 Phases=1 Conn=Delta Model=1 kV= 75 kW=   600 kVAR=   360 Duty=loadshape_D860_836rb
New Load.D860_836sc Bus1=860.3.1 Phases=1 Conn=Delta Model=1 kV= 75 kW=  2520 kVAR= 1320 Duty=loadshape_D860_836sc
New Load.D860_836rc Bus1=836.3.1 Phases=1 Conn=Delta Model=1 kV= 75 kW=  2520 kVAR= 1320 Duty=loadshape_D860_836rc


New Load.D836_840sa Bus1=836.1.2 Phases=1 Conn=Delta Model=5 kV= 75 kW=  1080 kVAR=  540 Duty=loadshape_D836_840sa
New Load.D836_840ra Bus1=840.1.2 Phases=1 Conn=Delta Model=5 kV= 75 kW=  1080 kVAR=  540 Duty=loadshape_D836_840ra
New Load.D836_840sb Bus1=836.2.3 Phases=1 Conn=Delta Model=5 kV= 75 kW=  1320 kVAR=  660 Duty=loadshape_D836_840sb
New Load.D836_840rb Bus1=840.2.3 Phases=1 Conn=Delta Model=5 kV= 75 kW=  1320 kVAR=  660 Duty=loadshape_D836_840rb

New Load.D862_838sb Bus1=862.2 Phases=1 Conn=Wye Model=1 kV= 43.2 kW=  1680 kVAR=  840 Duty=loadshape_D862_838sb
New Load.D862_838rb Bus1=838.2 Phases=1 Conn=Wye Model=1 kV= 43.2 kW=  1680 kVAR=  840 Duty=loadshape_D862_838rb

New Load.D842_844sa Bus1=842.1 Phases=1 Conn=Wye Model=1 kV= 43.2 kW=  540 kVAR=  300 Duty=loadshape_D842_844sa
New Load.D842_844ra Bus1=844.1 Phases=1 Conn=Wye Model=1 kV= 43.2 kW=  540 kVAR=  300 Duty=loadshape_D842_844ra

New Load.D844_846sb Bus1=844.2 Phases=1 Conn=Wye Model=1 kV= 43.2 kW=  1500 kVAR=  720 Duty=loadshape_D844_846sb
New Load.D844_846rb Bus1=846.2 Phases=1 Conn=Wye Model=1 kV= 43.2 kW=  1500 kVAR=  720 Duty=loadshape_D844_846rb
New Load.D844_846sc Bus1=844.3 Phases=1 Conn=Wye Model=1 kV= 43.2 kW=  1200 kVAR=  660 Duty=loadshape_D844_846sc
New Load.D844_846rc Bus1=846.3 Phases=1 Conn=Wye Model=1 kV= 43.2 kW=  1200 kVAR=  660 Duty=loadshape_D844_846rc

New Load.D846_848sb Bus1=846.2 Phases=1 Conn=Wye Model=1 kV= 43.2 kW=  1380 kVAR=  660 Duty=loadshape_D846_848sb
New Load.D846_848rb Bus1=848.2 Phases=1 Conn=Wye Model=1 kV= 43.2 kW=  1380 kVAR=  660 Duty=loadshape_D846_848rb

! PV SYSTEM DEFINITIONS

redirect irrad_up_down.dss

New Tshape.MyTemp npts=30 interval=1 temp=[25, 25, 25, 25, 25, 25, 25, 25, 25, 25,25, 25, 25, 25, 25, 25, 25, 25, 25, 25,25, 25, 25, 25, 25, 25, 25, 25, 25, 25]
New XYCurve.Eff npts=4 xarray=[.1 .2 .4 1.0] yarray=[1 1 1 1]
New XYCurve.FatorPvsT npts=4 xarray=[0 25 75 100] yarray=[1 1 1 1]

New PVSystem.PV860 phases=3 bus1=860 Pmpp=22555.1 kV=75 kVA=25000 conn=wye EffCurve=Eff
~ P-TCurve=FatorPvsT %Pmpp=42 Temperature=25 irradiance=0.98 pf=0.9 pfpriority=yes Duty=MyIrrad TDuty=MyTemp


New PVSystem.PV858 phases=3 bus1=858 Pmpp=6331 kV=75 kVA=7000 conn=wye EffCurve=Eff
~ P-TCurve=FatorPvsT %Pmpp=42 Temperature=25 irradiance=0.98 pf=0.9 pfpriority=yes Duty=MyIrrad TDuty=MyTemp

New PVSystem.PV840 phases=3 bus1=840 Pmpp=7914 kV=75 kVA=8400 conn=wye EffCurve=Eff
~ P-TCurve=FatorPvsT %Pmpp=42 Temperature=25 irradiance=0.98 pf=0.9 pfpriority=yes Duty=MyIrrad TDuty=MyTemp

New PVSystem.PV836 phases=3 bus1=836 Pmpp=12069 kV=75 kVA=13000 conn=wye EffCurve=Eff
~ P-TCurve=FatorPvsT %Pmpp=42 Temperature=25 irradiance=0.98 pf=0.9 pfpriority=yes Duty=MyIrrad TDuty=MyTemp

New PVSystem.PV834 phases=3 bus1=834 Pmpp=35217 kV=75 kVA=36000 conn=wye EffCurve=Eff
~ P-TCurve=FatorPvsT %Pmpp=42 Temperature=25 irradiance=0.98 pf=0.9 pfpriority=yes Duty=MyIrrad TDuty=MyTemp

New PVSystem.PV830 phases=1 bus1=830.1 Pmpp=17806 kV=43.2 kVA=18000 conn=wye EffCurve=Eff
~ P-TCurve=FatorPvsT %Pmpp=42 Temperature=25 irradiance=0.98 pf=0.9 pfpriority=yes Duty=MyIrrad TDuty=MyTemp


New PVSystem.PV8602 phases=3 bus1=860 Pmpp=23472 kV=75 kVA=24000 conn=wye EffCurve=Eff
~ P-TCurve=FatorPvsT %Pmpp=42 Temperature=25 irradiance=0.98 pf=0.9 pfpriority=yes Duty=MyIrrad TDuty=MyTemp

New PVSystem.PV8582 phases=3 bus1=858 Pmpp=3363 kV=75 kVA=3500 conn=wye EffCurve=Eff
~ P-TCurve=FatorPvsT %Pmpp=42 Temperature=25 irradiance=0.98 pf=0.9 pfpriority=yes Duty=MyIrrad TDuty=MyTemp

New PVSystem.PV848 phases=3 bus1=848 Pmpp=28292 kV=75 kVA=30000 conn=wye EffCurve=Eff
~ P-TCurve=FatorPvsT %Pmpp=42 Temperature=25 irradiance=0.98 pf=0.9 pfpriority=yes Duty=MyIrrad TDuty=MyTemp

New PVSystem.PV846 phases=3 bus1=846 Pmpp=13454 kV=75 kVA=14000 conn=wye EffCurve=Eff
~ P-TCurve=FatorPvsT %Pmpp=42 Temperature=25 irradiance=0.98 pf=0.9 pfpriority=yes Duty=MyIrrad TDuty=MyTemp

New PVSystem.PV844 phases=3 bus1=844 Pmpp=74472 kV=75 kVA=76000 conn=wye EffCurve=Eff
~ P-TCurve=FatorPvsT %Pmpp=42 Temperature=25 irradiance=0.98 pf=0.9 pfpriority=yes Duty=MyIrrad TDuty=MyTemp


New PVSystem.PV8402 phases=3 bus1=840 Pmpp=5342 kV=75 kVA=6000 conn=wye EffCurve=Eff
~ P-TCurve=FatorPvsT %Pmpp=42 Temperature=25 irradiance=0.98 pf=0.9 pfpriority=yes Duty=MyIrrad TDuty=MyTemp

New PVSystem.PV838 phases=3 bus1=838 Pmpp=5539 kV=75 kVA=6000 conn=wye EffCurve=Eff
~ P-TCurve=FatorPvsT %Pmpp=42 Temperature=25 irradiance=0.98 pf=0.9 pfpriority=yes Duty=MyIrrad TDuty=MyTemp


New PVSystem.PV832 phases=3 bus1=832 Pmpp=2967 kV=75 kVA=3200 conn=wye EffCurve=Eff
~ P-TCurve=FatorPvsT %Pmpp=42 Temperature=25 irradiance=0.98 pf=0.9 wattpriority=yes Duty=MyIrrad TDuty=MyTemp


New PVSystem.PV826 phases=3 bus1=826 Pmpp=7914 kV=75 kVA=9000 conn=wye EffCurve=Eff
~ P-TCurve=FatorPvsT %Pmpp=42 Temperature=25 irradiance=0.98 pf=0.9 wattpriority=yes Duty=MyIrrad TDuty=MyTemp


New PVSystem.PV824 phases=3 bus1=824 Pmpp=9694 kV=75 kVA=10000 conn=wye EffCurve=Eff
~ P-TCurve=FatorPvsT %Pmpp=42 Temperature=25 irradiance=0.98 pf=0.9 wattpriority=yes Duty=MyIrrad TDuty=MyTemp


!BATTERY DEFINITIONS. Initialize in disconnected mode
New Generator.batt1 bus1=890.1.2.3 kV=12.5 kW=0.001 pf=0.95 conn=Delta Model=1
New Generator.batt2 bus1=832.1.2.3 kV=75 kW=0.001 pf=0.95 conn=Delta Model=1
New Generator.batt3 bus1=844.1.2.3 kV=75 kW=0.001 pf=0.95 conn=Delta Model=1
New Generator.batt4 bus1=860.1.2.3 kV=75 kW=0.001 pf=0.95 conn=Delta Model=1

! PV SYSTEM DEFINITIONS


! let the DSS estimate voltage bases automatically
Set VoltageBases = "230,75,12.5"
CalcVoltageBases
!Solve

BusCoords IEEE34_BusXY.csv
Set mode=Duty number=1 hour=0 stepsize=1 sec=0
!Show Powers kVA Elem
