! PV系统数据配置文件
! 生成时间: 2025-07-29 09:57:00
! 注意: 路径中的000会在运行时被动态替换为worker_idx

! 定义PV温度系数曲线
New XYCurve.MyPvsT npts=4 xarray=[0 25 75 100] yarray=[1.2 1.0 0.8 0.6]

! 定义PV效率曲线
New XYCurve.MyEff npts=4 xarray=[.1 .2 1.0 1.2] yarray=[.86 .9 .98 .99]

! 定义辐照度LoadShape (路径中的000会被动态替换)
New Loadshape.MyIrrad npts=1440 sinterval=60 mult=(file=./irradiation/002/20250307_irradiance.csv)

! 定义温度TShape (路径中的000会被动态替换)
New TShape.MyTemp npts=1440 sinterval=60 temp=(file=./temperature/002/20250307_temperature.csv)
