! PV系统数据配置文件 - Episode 001
! 自动生成时间: 2025-08-06 19:21:10
! Worker索引: 1

! 定义PV温度系数曲线
New XYCurve.MyPvsT npts=4 xarray=[0 25 75 100] yarray=[1.2 1.0 0.8 0.6]

! 定义PV效率曲线
New XYCurve.MyEff npts=4 xarray=[.1 .2 1.0 1.2] yarray=[.86 .9 .98 .99]

! 定义辐照度LoadShape
New Loadshape.MyIrrad npts=360 sinterval=60 mult=(file=./irradiation/001/20250307_irradiance.csv)

! 定义温度TShape
New TShape.MyTemp npts=360 sinterval=60 temp=(file=./temperature/001/20250307_temperature.csv)
