! PV系统数据配置文件 - Episode 000
! 自动生成时间: 2025-08-08 18:42:25
! Worker索引: 0

! 定义PV温度系数曲线
New XYCurve.MyPvsT npts=4 xarray=[0 25 75 100] yarray=[1.2 1.0 0.8 0.6]

! 定义PV效率曲线
New XYCurve.MyEff npts=4 xarray=[.1 .2 1.0 1.2] yarray=[.86 .9 .98 .99]

! 使用默认辐照度LoadShape (无数据文件)
New Loadshape.MyIrrad npts=360 sinterval=60 mult=1.0 useactual=yes

! 使用默认温度TShape (无数据文件)
New TShape.MyTemp npts=360 sinterval=60 temp=25
