// IEEE 9500-Node 静态网络主文件（不平衡负荷版，network_unbal.dss）
// 唯一静态网络定义；时钟、场景与外部控制由公共 DSSSession 负责。
// 底稿：Original DSS Models/Master-unbal-initial-config.dss（官方 basecase）。
// 相对底稿的改动：
//   1) 部件 redirect 路径加上 "Original DSS Models/" 前缀（本文件位于 9500-Node 根目录），
//      Generators 用兼容副本 Generators_fixed.dss（PVSystem Mode=7 不被本仓 DSS C-API 支持）；
//   2) 移除 set Mark* 与 Plot daisy 绘图命令；
//   3) 保留 basecase 的机组出力、17 条 setkvbase、Energymeter 与 9 个常开联络开关；
//   4) 建立初始潮流的两次 solve 改用前推回代（solve mode=direct）：铭牌负荷下 Newton
//      法在本网络停滞（2% 电压平台）。注意 direct 把恒功率负荷按导纳处理，这里的
//      解仅用于 compile 期的分接整定与状态初始化；运行期求解固定 Newton 快照
//      （session.py），保证 Model=1 恒功率负荷语义正确。随机分接组合下 Newton
//      不收敛属真实电压崩溃工况（恒功率负荷鞍结），训练可用性需要环境级
//      失败语义（终止+惩罚）支持，见 docs/vvc-physics.md。
//
// 负荷时序由场景管线每步改写 Load.kw/kvar；PV 辐照/温度由 set_pv_conditions 注入。


Clear

New Circuit.final9500node

! Make the source stiff with small impedance
~ pu=1.05  r1=0  x1=0.001  r0=0  x0=0.001

Redirect  "Original DSS Models/WireData.dss"
Redirect  "Original DSS Models/CableData.dss"
! Use either LineGeometry or LineConstantsCodes
Redirect  "Original DSS Models/LineGeometry.dss"
!Redirect  "Original DSS Models/LineCodes.dss"
Redirect  "Original DSS Models/TriplexLineCodes.dss"

! Use either LineGeometry or LineConstantsCodes
Redirect  "Original DSS Models/LinesSwitchesGeometry.dss"
!Redirect  "Original DSS Models/LinesSwitchesLineCodes.dss"
Redirect  "Original DSS Models/Transformers.dss"
Redirect  "Original DSS Models/LoadXfmrCodes.dss"
Redirect  "Original DSS Models/TriplexLines.dss"
Redirect  "Original DSS Models/UnbalancedLoads.dss"
Redirect  "Original DSS Models/Capacitors.dss"
Redirect  "Original DSS Models/CapControls.dss"
Redirect  "Original DSS Models/Regulators.dss"

Redirect  Generators_fixed.dss  ! 官方 Mode=7 兼容副本（唯一差异见文件头）
Redirect  "Original DSS Models/EnergyStorage.dss"
Redirect  "Original DSS Models/PV_10pen_DSSPV.dss"
Redirect  "Original DSS Models/PV_NN_100_DSSPV.dss"

! Let DSS estimate the voltage bases
Set voltagebases=[115, 69, 12.47,  0.480, 0.208]
Calcvoltagebases     ! This also establishes the bus list
! Ensure that DERs use correct voltage base
setkvbase M1209DER480-1 kVll=0.480
setkvbase M1209-DIES1   kVll=0.480
setkvbase m2001DER480-1 kVll=0.480
setkvbase m2001-MT1     kVll=0.480
setkvbase m2001-MT2     kVll=0.480
setkvbase m2001-MT3     kVll=0.480
setkvbase m2001der-1    kVll=0.480
setkvbase m2001der-2    kVll=0.480
setkvbase m2001der-3    kVll=0.480
setkvbase m1142DER480-1 kVll=0.480
setkvbase m1142-LNG1    kVll=0.480
setkvbase m1089DER480-1 kVll=0.480
setkvbase m1089-LNG1    kVll=0.480
setkvbase m1089DER480-1 kVll=0.480
setkvbase m1089-DIES1   kVll=0.480
setkvbase m1069DER480-1 kVll=0.480
setkvbase m1069-MT1     kVll=0.480

! Load in bus coordinates now that bus list is established
LatLongCoords "Original DSS Models/LatLongCoords.dss"

New Energymeter.m1 Element=Line.LN5710794-3 Terminal=1

Set Maxiterations=30     ! Sometimes the solution takes more than the default 15 iterations
Set MaxControlIter=100

Set loadmult=1.0

! Generator Configuration
! CHP at 30% capacity, MT-1 at 25%, MT-2 at 50%, all other DG off.
Generator.SteamGen1.kw=1000
Generator.SteamGen1.vpu=1.00
Generator.MicroTurb-1.kw=50
Generator.MicroTurb-2.kw=0
Generator.MicroTurb-3.kw=0
Generator.WindTurb-1.kw=20
Generator.WindTurb-2.kw=20
Generator.WindTurb-3.kw=20
Generator.MicroTurb-4.kw=100
Generator.Diesel620.kw=0
Generator.Diesel590.kw=0
Generator.LNGEngine100.kw=0
Generator.LNGEngine1800.kw=0

! Set normal feeder configuration
open Line.WF856_48332_sw
open Line.WG127_48332_sw
open LINE.LN0653457_SW
open LINE.V7173_48332_SW
open LINE.TSW803273_SW
open LINE.A333_48332_SW
Set controlmode=static maxcontroliter=100
solve mode=direct
open LINE.TSW320328_SW
open LINE.A8645_48332_SW
open LINE.TSW568613_SW
Set controlmode=static maxcontroliter=100
solve mode=direct
